## System parameters #############

variable a equal 2^(1/6)   #lattice constant in LJ units, i.e. mininumum of LJ
variable y equal 5*$a      #width of box
variable z equal 5*$a      #breadth of box

variable y_boxlo equal -0.5*$a
variable y_boxhi equal $y+0.5*$a
variable z_boxlo equal -0.5*$a
variable z_boxhi equal $z+0.5*$a

##################################
dimension 3
boundary  f p p
atom_style atomic
units     lj
lattice   fcc 1 #now corner atoms should be at eq positions
region    overall block -10 100 ${y_boxlo} ${y_boxhi} ${z_boxlo} ${z_boxhi} units box

create_box 4 overall      #type 1 = immobile, type 2 = thermostatted (hot), type 3 = unthermalised, type 4 = thermostatted (cold)


### Fixed Left ###

variable n_left equal 3  #number of layers

variable x_left equal ${n_left}*$a


region   box1 block 0 ${x_left} 0 $y 0 $z units box
create_atoms  1 region box1


### Hot ###

variable n_hot equal 4  #number of layers

variable x_hot1 equal ${x_left}+0.00001
variable x_hot2 equal ${x_hot1}+${n_hot}*$a

region   box2 block ${x_hot1} ${x_hot2} 0 $y 0 $z units box
create_atoms  2 region box2
group         hot type 2


### Argon layer ###

variable n_argon equal 55  #number of layers


variable x_argon1 equal ${x_hot2}+0.00001
variable x_argon2 equal ${x_argon1}+${n_argon}*$a

region   box3 block ${x_argon1} ${x_argon2} 0 $y 0 $z units box
create_atoms  3 region box3

variable diff equal (${x_argon2}-${x_argon1})/${n_argon}

group argon_group type 3

### Cold ###

variable n_cold equal 4  #number of layers

variable x_cold1 equal ${x_argon2}+0.00001
variable x_cold2 equal ${x_cold1}+${n_cold}*$a

region   box4 block ${x_cold1} ${x_cold2} 0 $y 0 $z units box
create_atoms  4 region box4
group         cold type 4


### Fixed Right ####

variable n_right equal 3  #number of layers

variable x_right1 equal ${x_cold2}+0.00001
variable x_right2 equal ${x_right1}+${n_right}*$a

region   box5 block ${x_right1} ${x_right2} 0 $y 0 $z units box
create_atoms  1 region box5

group         fixed type 1


### Create vacuum gap ### (in the middle, 1 nm)

variable vacuum_width equal 3.0

variable vacuum_left equal ((${x_argon2}-${x_argon1})/2.0)-(${vacuum_width}/2.0)
variable vacuum_right equal ((${x_argon2}-${x_argon1})/2.0)+(${vacuum_width}/2.0)
region  vacuum_gap block ${vacuum_left} ${vacuum_right} INF INF INF INF
delete_atoms region vacuum_gap


### Particle and region properties ###
mass * 1.0
variable cutoff equal 3*$a
pair_style   lj/cut ${cutoff}
pair_coeff   * * 1.0 1.0


##Set bulk temp/region computes

compute hot_temp hot temp/region box2
compute cold_temp cold temp/region box4
compute argon_temp argon_group temp/region box3


### Temperature computes for argon layers ###

variable argon_temp1_lo equal ${x_argon1}+0*${diff}
variable argon_temp1_hi equal ${x_argon1}+1*${diff}
region argon_layer1 block ${argon_temp1_lo} ${argon_temp1_hi} 0 $y 0 $z units box
compute argon_temp1 argon_group temp/region argon_layer1
fix argon_av_temp1 argon_group ave/time 1 300 1000 c_argon_temp1

variable argon_temp2_lo equal ${x_argon1}+1*${diff}
variable argon_temp2_hi equal ${x_argon1}+2*${diff}
region argon_layer2 block ${argon_temp2_lo} ${argon_temp2_hi} 0 $y 0 $z units box
compute argon_temp2 argon_group temp/region argon_layer2
fix argon_av_temp2 argon_group ave/time 1 300 1000 c_argon_temp2

variable argon_temp3_lo equal ${x_argon1}+2*${diff}
variable argon_temp3_hi equal ${x_argon1}+3*${diff}
region argon_layer3 block ${argon_temp3_lo} ${argon_temp3_hi} 0 $y 0 $z units box
compute argon_temp3 argon_group temp/region argon_layer3
fix argon_av_temp3 argon_group ave/time 1 300 1000 c_argon_temp3

variable argon_temp4_lo equal ${x_argon1}+3*${diff}
variable argon_temp4_hi equal ${x_argon1}+4*${diff}
region argon_layer4 block ${argon_temp4_lo} ${argon_temp4_hi} 0 $y 0 $z units box
compute argon_temp4 argon_group temp/region argon_layer4
fix argon_av_temp4 argon_group ave/time 1 300 1000 c_argon_temp4

variable argon_temp5_lo equal ${x_argon1}+4*${diff}
variable argon_temp5_hi equal ${x_argon1}+5*${diff}
region argon_layer5 block ${argon_temp5_lo} ${argon_temp5_hi} 0 $y 0 $z units box
compute argon_temp5 argon_group temp/region argon_layer5
fix argon_av_temp5 argon_group ave/time 1 300 1000 c_argon_temp5

variable argon_temp6_lo equal ${x_argon1}+5*${diff}
variable argon_temp6_hi equal ${x_argon1}+6*${diff}
region argon_layer6 block ${argon_temp6_lo} ${argon_temp6_hi} 0 $y 0 $z units box
compute argon_temp6 argon_group temp/region argon_layer6
fix argon_av_temp6 argon_group ave/time 1 300 1000 c_argon_temp6

variable argon_temp7_lo equal ${x_argon1}+6*${diff}
variable argon_temp7_hi equal ${x_argon1}+7*${diff}
region argon_layer7 block ${argon_temp7_lo} ${argon_temp7_hi} 0 $y 0 $z units box
compute argon_temp7 argon_group temp/region argon_layer7
fix argon_av_temp7 argon_group ave/time 1 300 1000 c_argon_temp7

variable argon_temp8_lo equal ${x_argon1}+7*${diff}
variable argon_temp8_hi equal ${x_argon1}+8*${diff}
region argon_layer8 block ${argon_temp8_lo} ${argon_temp8_hi} 0 $y 0 $z units box
compute argon_temp8 argon_group temp/region argon_layer8
fix argon_av_temp8 argon_group ave/time 1 300 1000 c_argon_temp8

variable argon_temp9_lo equal ${x_argon1}+8*${diff}
variable argon_temp9_hi equal ${x_argon1}+9*${diff}
region argon_layer9 block ${argon_temp9_lo} ${argon_temp9_hi} 0 $y 0 $z units box
compute argon_temp9 argon_group temp/region argon_layer9
fix argon_av_temp9 argon_group ave/time 1 300 1000 c_argon_temp9

variable argon_temp10_lo equal ${x_argon1}+9*${diff}
variable argon_temp10_hi equal ${x_argon1}+10*${diff}
region argon_layer10 block ${argon_temp10_lo} ${argon_temp10_hi} 0 $y 0 $z units box
compute argon_temp10 argon_group temp/region argon_layer10
fix argon_av_temp10 argon_group ave/time 1 300 1000 c_argon_temp10

variable argon_temp11_lo equal ${x_argon1}+10*${diff}
variable argon_temp11_hi equal ${x_argon1}+11*${diff}
region argon_layer11 block ${argon_temp11_lo} ${argon_temp11_hi} 0 $y 0 $z units box
compute argon_temp11 argon_group temp/region argon_layer11
fix argon_av_temp11 argon_group ave/time 1 300 1000 c_argon_temp11

variable argon_temp12_lo equal ${x_argon1}+11*${diff}
variable argon_temp12_hi equal ${x_argon1}+12*${diff}
region argon_layer12 block ${argon_temp12_lo} ${argon_temp12_hi} 0 $y 0 $z units box
compute argon_temp12 argon_group temp/region argon_layer12
fix argon_av_temp12 argon_group ave/time 1 300 1000 c_argon_temp12

variable argon_temp13_lo equal ${x_argon1}+12*${diff}
variable argon_temp13_hi equal ${x_argon1}+13*${diff}
region argon_layer13 block ${argon_temp13_lo} ${argon_temp13_hi} 0 $y 0 $z units box
compute argon_temp13 argon_group temp/region argon_layer13
fix argon_av_temp13 argon_group ave/time 1 300 1000 c_argon_temp13

variable argon_temp14_lo equal ${x_argon1}+13*${diff}
variable argon_temp14_hi equal ${x_argon1}+14*${diff}
region argon_layer14 block ${argon_temp14_lo} ${argon_temp14_hi} 0 $y 0 $z units box
compute argon_temp14 argon_group temp/region argon_layer14
fix argon_av_temp14 argon_group ave/time 1 300 1000 c_argon_temp14

variable argon_temp15_lo equal ${x_argon1}+14*${diff}
variable argon_temp15_hi equal ${x_argon1}+15*${diff}
region argon_layer15 block ${argon_temp15_lo} ${argon_temp15_hi} 0 $y 0 $z units box
compute argon_temp15 argon_group temp/region argon_layer15
fix argon_av_temp15 argon_group ave/time 1 300 1000 c_argon_temp15

variable argon_temp16_lo equal ${x_argon1}+15*${diff}
variable argon_temp16_hi equal ${x_argon1}+16*${diff}
region argon_layer16 block ${argon_temp16_lo} ${argon_temp16_hi} 0 $y 0 $z units box
compute argon_temp16 argon_group temp/region argon_layer16
fix argon_av_temp16 argon_group ave/time 1 300 1000 c_argon_temp16

variable argon_temp17_lo equal ${x_argon1}+16*${diff}
variable argon_temp17_hi equal ${x_argon1}+17*${diff}
region argon_layer17 block ${argon_temp17_lo} ${argon_temp17_hi} 0 $y 0 $z units box
compute argon_temp17 argon_group temp/region argon_layer17
fix argon_av_temp17 argon_group ave/time 1 300 1000 c_argon_temp17

variable argon_temp18_lo equal ${x_argon1}+17*${diff}
variable argon_temp18_hi equal ${x_argon1}+18*${diff}
region argon_layer18 block ${argon_temp18_lo} ${argon_temp18_hi} 0 $y 0 $z units box
compute argon_temp18 argon_group temp/region argon_layer18
fix argon_av_temp18 argon_group ave/time 1 300 1000 c_argon_temp18

variable argon_temp19_lo equal ${x_argon1}+18*${diff}
variable argon_temp19_hi equal ${x_argon1}+19*${diff}
region argon_layer19 block ${argon_temp19_lo} ${argon_temp19_hi} 0 $y 0 $z units box
compute argon_temp19 argon_group temp/region argon_layer19
fix argon_av_temp19 argon_group ave/time 1 300 1000 c_argon_temp19

variable argon_temp20_lo equal ${x_argon1}+19*${diff}
variable argon_temp20_hi equal ${x_argon1}+20*${diff}
region argon_layer20 block ${argon_temp20_lo} ${argon_temp20_hi} 0 $y 0 $z units box
compute argon_temp20 argon_group temp/region argon_layer20
fix argon_av_temp20 argon_group ave/time 1 300 1000 c_argon_temp20

variable argon_temp21_lo equal ${x_argon1}+20*${diff}
variable argon_temp21_hi equal ${x_argon1}+21*${diff}
region argon_layer21 block ${argon_temp21_lo} ${argon_temp21_hi} 0 $y 0 $z units box
compute argon_temp21 argon_group temp/region argon_layer21
fix argon_av_temp21 argon_group ave/time 1 300 1000 c_argon_temp21

variable argon_temp22_lo equal ${x_argon1}+21*${diff}
variable argon_temp22_hi equal ${x_argon1}+22*${diff}
region argon_layer22 block ${argon_temp22_lo} ${argon_temp22_hi} 0 $y 0 $z units box
compute argon_temp22 argon_group temp/region argon_layer22
fix argon_av_temp22 argon_group ave/time 1 300 1000 c_argon_temp22

variable argon_temp23_lo equal ${x_argon1}+22*${diff}
variable argon_temp23_hi equal ${x_argon1}+23*${diff}
region argon_layer23 block ${argon_temp23_lo} ${argon_temp23_hi} 0 $y 0 $z units box
compute argon_temp23 argon_group temp/region argon_layer23
fix argon_av_temp23 argon_group ave/time 1 300 1000 c_argon_temp23

variable argon_temp24_lo equal ${x_argon1}+23*${diff}
variable argon_temp24_hi equal ${x_argon1}+24*${diff}
region argon_layer24 block ${argon_temp24_lo} ${argon_temp24_hi} 0 $y 0 $z units box
compute argon_temp24 argon_group temp/region argon_layer24
fix argon_av_temp24 argon_group ave/time 1 300 1000 c_argon_temp24

variable argon_temp25_lo equal ${x_argon1}+24*${diff}
variable argon_temp25_hi equal ${x_argon1}+25*${diff}
region argon_layer25 block ${argon_temp25_lo} ${argon_temp25_hi} 0 $y 0 $z units box
compute argon_temp25 argon_group temp/region argon_layer25
fix argon_av_temp25 argon_group ave/time 1 300 1000 c_argon_temp25

variable argon_temp26_lo equal ${x_argon1}+25*${diff}
variable argon_temp26_hi equal ${x_argon1}+26*${diff}
region argon_layer26 block ${argon_temp26_lo} ${argon_temp26_hi} 0 $y 0 $z units box
compute argon_temp26 argon_group temp/region argon_layer26
fix argon_av_temp26 argon_group ave/time 1 300 1000 c_argon_temp26

variable argon_temp27_lo equal ${x_argon1}+26*${diff}
variable argon_temp27_hi equal ${x_argon1}+27*${diff}
region argon_layer27 block ${argon_temp27_lo} ${argon_temp27_hi} 0 $y 0 $z units box
compute argon_temp27 argon_group temp/region argon_layer27
fix argon_av_temp27 argon_group ave/time 1 300 1000 c_argon_temp27

variable argon_temp28_lo equal ${x_argon1}+27*${diff}
variable argon_temp28_hi equal ${x_argon1}+28*${diff}
region argon_layer28 block ${argon_temp28_lo} ${argon_temp28_hi} 0 $y 0 $z units box
compute argon_temp28 argon_group temp/region argon_layer28
fix argon_av_temp28 argon_group ave/time 1 300 1000 c_argon_temp28

variable argon_temp29_lo equal ${x_argon1}+28*${diff}
variable argon_temp29_hi equal ${x_argon1}+29*${diff}
region argon_layer29 block ${argon_temp29_lo} ${argon_temp29_hi} 0 $y 0 $z units box
compute argon_temp29 argon_group temp/region argon_layer29
fix argon_av_temp29 argon_group ave/time 1 300 1000 c_argon_temp29

variable argon_temp30_lo equal ${x_argon1}+29*${diff}
variable argon_temp30_hi equal ${x_argon1}+30*${diff}
region argon_layer30 block ${argon_temp30_lo} ${argon_temp30_hi} 0 $y 0 $z units box
compute argon_temp30 argon_group temp/region argon_layer30
fix argon_av_temp30 argon_group ave/time 1 300 1000 c_argon_temp30

variable argon_temp31_lo equal ${x_argon1}+30*${diff}
variable argon_temp31_hi equal ${x_argon1}+31*${diff}
region argon_layer31 block ${argon_temp31_lo} ${argon_temp31_hi} 0 $y 0 $z units box
compute argon_temp31 argon_group temp/region argon_layer31
fix argon_av_temp31 argon_group ave/time 1 300 1000 c_argon_temp31

variable argon_temp32_lo equal ${x_argon1}+31*${diff}
variable argon_temp32_hi equal ${x_argon1}+32*${diff}
region argon_layer32 block ${argon_temp32_lo} ${argon_temp32_hi} 0 $y 0 $z units box
compute argon_temp32 argon_group temp/region argon_layer32
fix argon_av_temp32 argon_group ave/time 1 300 1000 c_argon_temp32

variable argon_temp33_lo equal ${x_argon1}+32*${diff}
variable argon_temp33_hi equal ${x_argon1}+33*${diff}
region argon_layer33 block ${argon_temp33_lo} ${argon_temp33_hi} 0 $y 0 $z units box
compute argon_temp33 argon_group temp/region argon_layer33
fix argon_av_temp33 argon_group ave/time 1 300 1000 c_argon_temp33

variable argon_temp34_lo equal ${x_argon1}+33*${diff}
variable argon_temp34_hi equal ${x_argon1}+34*${diff}
region argon_layer34 block ${argon_temp34_lo} ${argon_temp34_hi} 0 $y 0 $z units box
compute argon_temp34 argon_group temp/region argon_layer34
fix argon_av_temp34 argon_group ave/time 1 300 1000 c_argon_temp34

variable argon_temp35_lo equal ${x_argon1}+34*${diff}
variable argon_temp35_hi equal ${x_argon1}+35*${diff}
region argon_layer35 block ${argon_temp35_lo} ${argon_temp35_hi} 0 $y 0 $z units box
compute argon_temp35 argon_group temp/region argon_layer35
fix argon_av_temp35 argon_group ave/time 1 300 1000 c_argon_temp35

variable argon_temp36_lo equal ${x_argon1}+35*${diff}
variable argon_temp36_hi equal ${x_argon1}+36*${diff}
region argon_layer36 block ${argon_temp36_lo} ${argon_temp36_hi} 0 $y 0 $z units box
compute argon_temp36 argon_group temp/region argon_layer36
fix argon_av_temp36 argon_group ave/time 1 300 1000 c_argon_temp36

variable argon_temp37_lo equal ${x_argon1}+36*${diff}
variable argon_temp37_hi equal ${x_argon1}+37*${diff}
region argon_layer37 block ${argon_temp37_lo} ${argon_temp37_hi} 0 $y 0 $z units box
compute argon_temp37 argon_group temp/region argon_layer37
fix argon_av_temp37 argon_group ave/time 1 300 1000 c_argon_temp37

variable argon_temp38_lo equal ${x_argon1}+37*${diff}
variable argon_temp38_hi equal ${x_argon1}+38*${diff}
region argon_layer38 block ${argon_temp38_lo} ${argon_temp38_hi} 0 $y 0 $z units box
compute argon_temp38 argon_group temp/region argon_layer38
fix argon_av_temp38 argon_group ave/time 1 300 1000 c_argon_temp38

variable argon_temp39_lo equal ${x_argon1}+38*${diff}
variable argon_temp39_hi equal ${x_argon1}+39*${diff}
region argon_layer39 block ${argon_temp39_lo} ${argon_temp39_hi} 0 $y 0 $z units box
compute argon_temp39 argon_group temp/region argon_layer39
fix argon_av_temp39 argon_group ave/time 1 300 1000 c_argon_temp39

variable argon_temp40_lo equal ${x_argon1}+39*${diff}
variable argon_temp40_hi equal ${x_argon1}+40*${diff}
region argon_layer40 block ${argon_temp40_lo} ${argon_temp40_hi} 0 $y 0 $z units box
compute argon_temp40 argon_group temp/region argon_layer40
fix argon_av_temp40 argon_group ave/time 1 300 1000 c_argon_temp40

variable argon_temp41_lo equal ${x_argon1}+40*${diff}
variable argon_temp41_hi equal ${x_argon1}+41*${diff}
region argon_layer41 block ${argon_temp41_lo} ${argon_temp41_hi} 0 $y 0 $z units box
compute argon_temp41 argon_group temp/region argon_layer41
fix argon_av_temp41 argon_group ave/time 1 300 1000 c_argon_temp41

variable argon_temp42_lo equal ${x_argon1}+41*${diff}
variable argon_temp42_hi equal ${x_argon1}+42*${diff}
region argon_layer42 block ${argon_temp42_lo} ${argon_temp42_hi} 0 $y 0 $z units box
compute argon_temp42 argon_group temp/region argon_layer42
fix argon_av_temp42 argon_group ave/time 1 300 1000 c_argon_temp42

variable argon_temp43_lo equal ${x_argon1}+42*${diff}
variable argon_temp43_hi equal ${x_argon1}+43*${diff}
region argon_layer43 block ${argon_temp43_lo} ${argon_temp43_hi} 0 $y 0 $z units box
compute argon_temp43 argon_group temp/region argon_layer43
fix argon_av_temp43 argon_group ave/time 1 300 1000 c_argon_temp43

variable argon_temp44_lo equal ${x_argon1}+43*${diff}
variable argon_temp44_hi equal ${x_argon1}+44*${diff}
region argon_layer44 block ${argon_temp44_lo} ${argon_temp44_hi} 0 $y 0 $z units box
compute argon_temp44 argon_group temp/region argon_layer44
fix argon_av_temp44 argon_group ave/time 1 300 1000 c_argon_temp44

variable argon_temp45_lo equal ${x_argon1}+44*${diff}
variable argon_temp45_hi equal ${x_argon1}+45*${diff}
region argon_layer45 block ${argon_temp45_lo} ${argon_temp45_hi} 0 $y 0 $z units box
compute argon_temp45 argon_group temp/region argon_layer45
fix argon_av_temp45 argon_group ave/time 1 300 1000 c_argon_temp45

variable argon_temp46_lo equal ${x_argon1}+45*${diff}
variable argon_temp46_hi equal ${x_argon1}+46*${diff}
region argon_layer46 block ${argon_temp46_lo} ${argon_temp46_hi} 0 $y 0 $z units box
compute argon_temp46 argon_group temp/region argon_layer46
fix argon_av_temp46 argon_group ave/time 1 300 1000 c_argon_temp46

variable argon_temp47_lo equal ${x_argon1}+46*${diff}
variable argon_temp47_hi equal ${x_argon1}+47*${diff}
region argon_layer47 block ${argon_temp47_lo} ${argon_temp47_hi} 0 $y 0 $z units box
compute argon_temp47 argon_group temp/region argon_layer47
fix argon_av_temp47 argon_group ave/time 1 300 1000 c_argon_temp47

variable argon_temp48_lo equal ${x_argon1}+47*${diff}
variable argon_temp48_hi equal ${x_argon1}+48*${diff}
region argon_layer48 block ${argon_temp48_lo} ${argon_temp48_hi} 0 $y 0 $z units box
compute argon_temp48 argon_group temp/region argon_layer48
fix argon_av_temp48 argon_group ave/time 1 300 1000 c_argon_temp48

variable argon_temp49_lo equal ${x_argon1}+48*${diff}
variable argon_temp49_hi equal ${x_argon1}+49*${diff}
region argon_layer49 block ${argon_temp49_lo} ${argon_temp49_hi} 0 $y 0 $z units box
compute argon_temp49 argon_group temp/region argon_layer49
fix argon_av_temp49 argon_group ave/time 1 300 1000 c_argon_temp49

variable argon_temp50_lo equal ${x_argon1}+49*${diff}
variable argon_temp50_hi equal ${x_argon1}+50*${diff}
region argon_layer50 block ${argon_temp50_lo} ${argon_temp50_hi} 0 $y 0 $z units box
compute argon_temp50 argon_group temp/region argon_layer50
fix argon_av_temp50 argon_group ave/time 1 300 1000 c_argon_temp50

variable argon_temp51_lo equal ${x_argon1}+50*${diff}
variable argon_temp51_hi equal ${x_argon1}+51*${diff}
region argon_layer51 block ${argon_temp51_lo} ${argon_temp51_hi} 0 $y 0 $z units box
compute argon_temp51 argon_group temp/region argon_layer51
fix argon_av_temp51 argon_group ave/time 1 300 1000 c_argon_temp51

variable argon_temp52_lo equal ${x_argon1}+51*${diff}
variable argon_temp52_hi equal ${x_argon1}+52*${diff}
region argon_layer52 block ${argon_temp52_lo} ${argon_temp52_hi} 0 $y 0 $z units box
compute argon_temp52 argon_group temp/region argon_layer52
fix argon_av_temp52 argon_group ave/time 1 300 1000 c_argon_temp52

variable argon_temp53_lo equal ${x_argon1}+52*${diff}
variable argon_temp53_hi equal ${x_argon1}+53*${diff}
region argon_layer53 block ${argon_temp53_lo} ${argon_temp53_hi} 0 $y 0 $z units box
compute argon_temp53 argon_group temp/region argon_layer53
fix argon_av_temp53 argon_group ave/time 1 300 1000 c_argon_temp53

variable argon_temp54_lo equal ${x_argon1}+53*${diff}
variable argon_temp54_hi equal ${x_argon1}+54*${diff}
region argon_layer54 block ${argon_temp54_lo} ${argon_temp54_hi} 0 $y 0 $z units box
compute argon_temp54 argon_group temp/region argon_layer54
fix argon_av_temp54 argon_group ave/time 1 300 1000 c_argon_temp54

variable argon_temp55_lo equal ${x_argon1}+54*${diff}
variable argon_temp55_hi equal ${x_argon1}+55*${diff}
region argon_layer55 block ${argon_temp55_lo} ${argon_temp55_hi} 0 $y 0 $z units box
compute argon_temp55 argon_group temp/region argon_layer55
fix argon_av_temp55 argon_group ave/time 1 300 1000 c_argon_temp55


##compute fixed_temp fixed temp #should always give 0 in thermo report
group moving type 2 3 4
compute moving_temp moving temp

compute moving_pe moving pe/atom pair
compute moving_pe_sum moving reduce ave c_moving_pe
#delete_atoms group fixed
###############################################################

timestep 0.0005 #approx 1 femtosecond


###############################################################

##First set all non-fixed atoms at 10K
#velocity  hot create 0.0826 28711 mom yes rot yes dist gaussian
#velocity  cold create 0.0826 28712 mom yes rot yes dist gaussian
#velocity  all set NULL NULL NULL units box
#velocity  argon_group create 0.0826 28713 mom yes rot yes dist gaussian

velocity moving create 0.0826 28711 mom yes rot yes dist gaussian

#NVE Integrators

#fix spring all spring/self 55000


minimize 1.0e-4 1.0e-6 1000 1000
fix nve moving nve
#fix nve2 hot nve
#fix nve3 cold nve

dump xyz all xyz 1000 [26.08]argon2__vacuum_temp-region-TEST-mini-flux.xyz

#################################################### 10K temperature phase
thermo_style custom step c_moving_pe_sum etotal c_hot_temp c_moving_temp

thermo 5
run 100  #This should be changed to 3000000 if you want to run for 3 ns as in paper
velocity moving scale 0.0826
run 100
velocity moving scale 0.0826
run 100
velocity moving scale 0.0826
run 100
velocity moving scale 0.0826
run 100
velocity moving scale 0.0826
run 100
velocity moving scale 0.0826
run 100
velocity moving scale 0.0826
run 100
velocity moving scale 0.0826
run 100
velocity moving scale 0.0826
run 100
velocity moving scale 0.0826
fix thermostat moving langevin 0.0826 0.0826 0.1 2342235 tally yes
thermo 50
run 9000 #should bring total runtime to 10 ps

print "NOW BEGINNING 1 NANOSECOND EQUILIBRATION AT 10K!!!"

thermo 10000  #thermo report every 10 picoseconds
run 1000000 #should be 1 nanosecond
#################################################### NVE phase, just like in argon paper (maybe I should not need to unfix thermostat in this phase, i.e. this NVE only phase is unnecessary)
unfix thermostat
#fix thermostat2 hot langevin 0.0826 0.6 1.0 987234 tally yes
#fix thermostat3 cold langevin 0.0826 0.0826 1.0 48756 tally yes

print "NOW BEGINNING NVE-ONLY EQUILIBRATION FOR 2 NANOSECONDS!!!"
run 2000000 #should be 2 nanoseconds
####################################################

#thermo_style custom step c_moving_pe_sum etotal c_hot_temp c_moving_temp

#run 1000

#print 'Next phase'
#unfix thermostat2

######################################################## Temperature rise from 10 to 80K phase

fix thermostat4 hot langevin 0.0826 0.6 0.1 789475 tally yes

fix thermostat5 cold langevin 0.0826 0.0826 0.1 87342 tally yes

thermo 10 #thermo report every 10 femtoseconds

thermo_style custom step c_hot_temp c_cold_temp c_argon_temp


print "NOW RAISING TEMPERATURE OF HOT ATOMS TO 80K!!!"
run 1000 #should be 1 ps of runtime

velocity hot scale 0.6

######################################################### Steady state phase, hot at 80K, cold at 10K (or whatever constant temperature during NVE)
unfix thermostat4

fix thermostat_hot hot langevin 0.6 0.6 0.1 837482 tally yes

thermo_style custom c_hot_temp c_cold_temp step  f_argon_av_temp1  f_argon_av_temp2  f_argon_av_temp3  f_argon_av_temp4  f_argon_av_temp5  f_argon_av_temp6  f_argon_av_temp7  f_argon_av_temp8  f_argon_av_temp9  f_argon_av_temp10  f_argon_av_temp11  f_argon_av_temp12  f_argon_av_temp13  f_argon_av_temp14  f_argon_av_temp15  f_argon_av_temp16  f_argon_av_temp17  f_argon_av_temp18  f_argon_av_temp19  f_argon_av_temp20  f_argon_av_temp21  f_argon_av_temp22  f_argon_av_temp23  f_argon_av_temp24  f_argon_av_temp25  f_argon_av_temp26  f_argon_av_temp27  f_argon_av_temp28  f_argon_av_temp29  f_argon_av_temp30  f_argon_av_temp31  f_argon_av_temp32  f_argon_av_temp33  f_argon_av_temp34  f_argon_av_temp35  f_argon_av_temp36  f_argon_av_temp37  f_argon_av_temp38  f_argon_av_temp39  f_argon_av_temp40  f_argon_av_temp41  f_argon_av_temp42  f_argon_av_temp43  f_argon_av_temp44  f_argon_av_temp45  f_argon_av_temp46  f_argon_av_temp47  f_argon_av_temp48  f_argon_av_temp49  f_argon_av_temp50  f_argon_av_temp51  f_argon_av_temp52  f_argon_av_temp53

thermo 1000 #thermo report every picosecond
print "NOW RUNNING SYSTEM WITH HOT AT 80K AND COLD AT 10K, THERMO NOW GIVES TEMPERATURE PROFILE!!!"
run 40000 #should be 40 ps of runtime


### Heat flux computes ###
compute      myKE hot ke
compute      KE_hot hot ke/atom
compute      hot_group_temp hot temp
compute      Stress_hot hot stress/atom hot_group_temp pair
compute      PE_hot hot pe/atom pair

compute      myKE2 type2_chain ke
compute      KE_cold  cold ke/atom
compute      cold_group_temp cold temp
compute      Stress_cold cold stress/atom cold_group_temp pair
compute      PE_cold cold pe/atom pair


compute      hot_flux hot heat/flux KE_hot PE_hot Stress_hot
variable     volume equal (${x_hot2}-${x_hot1})*$y*$z
variable     Jx equal c_chain1_flux[1]/${volume}
variable     Jy equal c_chain1_flux[2]/${volume}

compute      cold_flux cold heat/flux KE_cold PE_cold Stress_cold
variable     Jx2 equal c_chain2_flux[1]/${volume}
variable     Jy2 equal c_chain2_flux[2]/${volume}


thermo_style custom step c_hot_temp c_cold_temp step v_Jx v_Jy v_Jx2 v_Jy2 etotal
print "NOW CHECKING FLUX IN AND OUT OF HOT AND COLD RESPECTIVELY"
run 40000
